<?xml version="1.0"?>
<?xml-stylesheet type="text/xsl" href="http://jsbsim.sourceforge.net/JSBSim.xsl"?>
<fdm_config name="T38" version="2.0" release="BETA"
    xmlns:xsi="http://www.w3.org/2001/XMLSchema-instance"
    xsi:noNamespaceSchemaLocation="http://jsbsim.sourceforge.net/JSBSim.xsd">

 <fileheader>
     <author>Aeromatic v 0.8, DPC</author>
     <filecreationdate>2004-01-01</filecreationdate>
     <version>$Revision: 1.14 $</version>
     <description>Models a Northrop T-38</description>
 </fileheader>

<!--
  File:     T38.xml
  Inputs:
    name:          T38
    type:          two-engine transonic/supersonic fighter
    max weight:    12500.0 lb
    wing span:     25.25 ft
    length:        46.3 ft
    wing area:     170.0 sq-ft
    gear type:     tricycle
    retractable?:  yes
    # engines:     2
    engine type:   turbine
    engine layout: aft fuselage
    yaw damper?    yes
  Outputs:
    wing loading:  73.53 lb/sq-ft
    CL-alpha:      3.6 per radian
    CL-0:          0.08
    CL-max:        1
    CD-0:          0.024
    K:             0.09

-->

    <metrics>
        <wing_incidence unit="DEG"> 0</wing_incidence>
        <wingarea unit="FT2">  208 </wingarea>
        <wingspan unit="FT">    28.8 </wingspan>
        <chord unit="FT">        6.73 </chord>
        <htailarea unit="FT2">  34 </htailarea>
        <htailarm unit="FT">    13 </htailarm>
        <vtailarea unit="FT2">  47 </vtailarea>
        <vtailarm unit="FT">    13 </vtailarm>
        <location name="AERORP" unit="IN">
            <x> 340 </x>
            <y>   0 </y>
            <z>   0 </z>
        </location>
        <location name="EYEPOINT" unit="IN">
            <x> 154 </x>
            <y>   0 </y>
            <z>  36 </z>
        </location>
        <location name="VRP" unit="IN">
            <x>  340 </x>
            <y>    0 </y>
            <z>    0 </z>
        </location>
    </metrics>

    <mass_balance>
        <ixx unit="SLUG*FT2"> 10000 </ixx>
        <iyy unit="SLUG*FT2"> 46000 </iyy>
        <izz unit="SLUG*FT2"> 39000 </izz>
        <emptywt unit="LBS">   9558 </emptywt>
        <location name="CG" unit="IN">
            <x> 340 </x>
            <y> 0 </y>
            <z> 0 </z>
    	</location>

   	<pointmass name="pylon1.L"><!-- left wingtip rail pointmass 0 -->
      	  <weight unit="LBS"> 0 </weight>
      	  <location name="POINTMASS" unit="IN">
            <x>  350 </x>
            <y> -166 </y>
            <z>   -0 </z>
      	  </location>
	</pointmass>

     	<pointmass name="pylon2.L"><!-- left wing outboard pylon pointmass 1 -->
      	  <weight unit="LBS"> 0 </weight>
      	  <location name="POINTMASS" unit="IN">
            <x>  320 </x>
            <y> -128 </y>
            <z>  -20 </z>
          </location>
        </pointmass>

   	<pointmass name="pylon3.L"><!-- left wing inboard pylon pointmass 2 -->
      	  <weight unit="LBS"> 0 </weight>
          <location name="POINTMASS" unit="IN">
            <x>  331 </x>
            <y> -100 </y>
            <z>  -26 </z>
      	  </location>
   	</pointmass>

   	<pointmass name="pylon.C"><!-- empty centerline fuel tank pointmass 3 -->
      	  <weight unit="LBS"> 0 </weight>
      	  <location name="POINTMASS" unit="IN">
            <x>  272 </x>
            <y>    0 </y>
            <z>  -31 </z>
      	  </location>
   	</pointmass>

   	<pointmass name="pylon3.R"><!-- right wing inboard pylon pointmass 4 -->
      	  <weight unit="LBS"> 0 </weight>
      	  <location name="POINTMASS" unit="IN">
            <x>  320 </x>
            <y>  100 </y>
            <z>  -26 </z>
      	  </location>
   	</pointmass>

   	<pointmass name="pylon2.R"><!-- right wing outboard pylon pointmass 5 -->
      	  <weight unit="LBS"> 0 </weight>
      	  <location name="POINTMASS" unit="IN">
            <x>  331 </x>
            <y>  128 </y>
            <z>  -20 </z>
      	  </location>
   	</pointmass>

   	<pointmass name="pylon1.R"><!-- right wingtip rail pointmass 6 -->
      	  <weight unit="LBS"> 0 </weight>
      	  <location name="POINTMASS" unit="IN">
            <x>  350 </x>
            <y>  166 </y>
            <z>   -0 </z>
      	  </location>
	</pointmass>

    </mass_balance>

    <ground_reactions>
        <contact type="BOGEY" name="NOSE_LG">
            <location unit="IN">
                <x> 140 </x>
                <y>   0 </y>
                <z> -53 </z>
            </location>
            <static_friction>  0.8 </static_friction>
            <dynamic_friction> 0.5 </dynamic_friction>
            <rolling_friction> 0.02 </rolling_friction>
            <spring_coeff unit="LBS/FT"> 5000 </spring_coeff>
            <damping_coeff unit="LBS/FT/SEC"> 3000 </damping_coeff>
            <max_steer unit="DEG"> 65 </max_steer>
            <brake_group> NONE </brake_group>
            <retractable>1</retractable>
        </contact>
        <contact type="BOGEY" name="LEFT_MLG">
            <location unit="IN">
                <x> 349 </x>
                <y> -75 </y>
                <z> -55 </z>
            </location>
            <static_friction> 0.8 </static_friction>
            <dynamic_friction> 0.5 </dynamic_friction>
            <rolling_friction> 0.02 </rolling_friction>
            <spring_coeff unit="LBS/FT"> 15000 </spring_coeff>
            <damping_coeff unit="LBS/FT/SEC"> 7000 </damping_coeff>
            <brake_group> LEFT </brake_group>
            <retractable>1</retractable>
        </contact>
        <contact type="BOGEY" name="RIGHT_MLG">
            <location unit="IN">
                <x> 349 </x>
                <y>  75 </y>
                <z> -55 </z>
            </location>
            <static_friction> 0.8 </static_friction>
            <dynamic_friction> 0.5 </dynamic_friction>
            <rolling_friction> 0.02 </rolling_friction>
            <spring_coeff unit="LBS/FT"> 15000 </spring_coeff>
            <damping_coeff unit="LBS/FT/SEC"> 7000 </damping_coeff>
            <brake_group> RIGHT </brake_group>
            <retractable>1</retractable>
        </contact>
        <contact type="STRUCTURE" name="LEFT_WING">
            <location unit="IN">
                <x>  310 </x>
                <y> -132 </y>
                <z>    0 </z>
            </location>
            <static_friction>  1 </static_friction>
            <dynamic_friction> 1 </dynamic_friction>
            <spring_coeff unit="LBS/FT">      2000 </spring_coeff>
            <damping_coeff unit="LBS/FT/SEC"> 100 </damping_coeff>
        </contact>
        <contact type="STRUCTURE" name="RIGHT_WING">
            <location unit="IN">
                <x> 310 </x>
                <y> 132 </y>
                <z>   0 </z>
            </location>
            <static_friction>  1 </static_friction>
            <dynamic_friction> 1 </dynamic_friction>
            <spring_coeff unit="LBS/FT">      2000 </spring_coeff>
            <damping_coeff unit="LBS/FT/SEC"> 100 </damping_coeff>
        </contact>
        <contact type="STRUCTURE" name="NOSE">
            <location unit="IN">
                <x>  30 </x>
                <y>   0 </y>
                <z> -15 </z>
            </location>
            <static_friction>  100 </static_friction>
            <dynamic_friction> 100 </dynamic_friction>
            <spring_coeff unit="LBS/FT">      20000 </spring_coeff>
            <damping_coeff unit="LBS/FT/SEC"> 10000 </damping_coeff>
        </contact>
        <contact type="STRUCTURE" name="TAIL">
            <location unit="IN">
                <x> 550 </x>
                <y>   0 </y>
                <z> -20 </z>
            </location>
            <static_friction>  100 </static_friction>
            <dynamic_friction> 100 </dynamic_friction>
            <spring_coeff unit="LBS/FT">      20000 </spring_coeff>
            <damping_coeff unit="LBS/FT/SEC"> 10000 </damping_coeff>
        </contact>
    </ground_reactions>
    <propulsion>
        <engine file="J85-GE-21">
            <location unit="IN">
                <x> 452 </x>
                <y> -20 </y>
                <z> 0 </z>
            </location>
            <feed>0</feed>
            <feed>1</feed>
            <feed>2</feed>
            <feed>3</feed>
            <feed>4</feed>
            <feed>5</feed>
            <thruster file="direct">
                <location unit="IN">
                    <x> 551 </x>
                    <y> -20 </y>
                    <z> 0 </z>
                </location>
                <orient unit="DEG">
                    <roll> 0.0 </roll>
                    <pitch> 0.0 </pitch>
                    <yaw> 0.0 </yaw>
                </orient>
            </thruster>
        </engine>
        <engine file="J85-GE-21">
            <location unit="IN">
                <x> 452 </x>
                <y> 20 </y>
                <z> 0 </z>
            </location>
            <feed>0</feed>
            <feed>1</feed>
            <feed>2</feed>
            <feed>3</feed>
            <feed>4</feed>
            <feed>5</feed>
            <thruster file="direct">
                <location unit="IN">
                    <x> 551 </x>
                    <y> 20 </y>
                    <z> 0 </z>
                </location>
                <orient unit="DEG">
                    <roll> 0.0 </roll>
                    <pitch> 0.0 </pitch>
                    <yaw> 0.0 </yaw>
                </orient>
            </thruster>
        </engine>
        <!-- REFERENCE:

		'Vol. 5 - F-5E & F Tiger II: USAF & USN Agressor Aircraft'
		by Bert Kinzey
		[ISBN 0890241627, First published: 1982]
		72 pages.
		-->
        <!-- 1 USGallon = 6.79 lbs http://www.scenery.org/faq_aviation.htm  -->
        <tank type="FUEL">    <!-- Tank number 0 - Forward Cell -->
        <!-- -1.02734	-0.312495	0.26 -->
            <location unit="IN">
                <x> 298 </x>
                <y> 0 </y>
                <z> 0 </z>
            </location>
            <capacity unit="LBS"> 2003.05 </capacity>
            <contents unit="LBS"> 2000.00 </contents>
        </tank>
        <tank type="FUEL">    <!-- Tank number 1 - Center Cell -->
        <!-- 0.98438	0.972656	0 -->
            <location unit="IN">
                <x> 350 </x>
                <y> 0 </y>
                <z> 0 </z>
            </location>
            <capacity unit="LBS"> 1459.85 </capacity>
            <contents unit="LBS"> 1450.00 </contents>
        </tank>
        <!-- 2.17384	0.880859	0 -->
        <tank type="FUEL">    <!-- Tank number 2 - Aft Cell -->
            <location unit="IN">
                <x> 370 </x>
                <y> 0 </y>
                <z> 0 </z>
            </location>
            <capacity unit="LBS"> 1093.19 </capacity>
            <contents unit="LBS"> 1000.00 </contents>
        </tank>
        <tank type="FUEL">    <!-- Tank Number 3 - Centreline Droptank max 275 gal-->
            <location unit="IN">
                <x> 270 </x>
                <y>   0 </y>
		<z> -31 </z>
            </location>
            <capacity unit="LBS"> 1867.5 </capacity>
            <contents unit="LBS"> 1850.00 </contents>
        </tank>
        <tank type="FUEL">    <!-- Tank Number 4 - Left Droptank max 275 gal-->
            <location unit="IN">
                <x> 331 </x>
		<y>-100 </y>
                <z>-26  </z>
            </location>
            <capacity unit="LBS"> 1867.5 </capacity>
            <contents unit="LBS"> 1850.00 </contents>
        </tank>
	<tank type="FUEL">    <!-- Tank Number 5 - Right Droptank max 275 gal-->
            <location unit="IN">
                <x> 331 </x>
                <y> 100 </y>
		<z>-26  </z>
            </location>
            <capacity unit="LBS"> 1867.5 </capacity>
            <contents unit="LBS"> 1850.00 </contents>
        </tank>
    </propulsion>

 <system file="gear"/>
 <system file="flaps"/>
 <system file="speedbrakes"/>
 <system file="FCS-pitch"/>
 <system file="FCS-roll"/>
 <system file="FCS-yaw"/>
 <system file="NWS"/>
 <system file="alpha_buffet"/>
 <!--system file="armament"/-->
 <system file="crash-detect"/>
 <!--system file="beacon"/>
 <system file="beacon2"/-->
 <system file="strobe"/>
 <system file="particles"/>
 <system file="hook"/>
 <system file="nose_lift"/>
 <system file="autoslats"/>
 <system file="canopy"/>
 <system file="chute"/>
 <system file="fcs-property-copy"/>


    <flight_control name="FCS: F5E-FCS">
    </flight_control>

    <aerodynamics>

        <function name="aero/function/kCDge">
            <description>Change_in_drag_due_to_ground_effect</description>
            <product>
                  <table>
                      <independentVar>aero/h_b-mac-ft</independentVar>
                      <tableData>
                          0.0000	0.0480
                          0.1000	0.5150
                          0.1500	0.6290
                          0.2000	0.7090
                          0.3000	0.8150
                          0.4000	0.8820
                          0.5000	0.9280
                          0.6000	0.9620
                          0.7000	0.9880
                          0.8000	1.0000
                      </tableData>
                  </table>
            </product>
        </function>

        <function name="aero/function/kCLge">
            <description>Change_in_lift_due_to_ground_effect</description>
            <product>
                  <table>
                      <independentVar>aero/h_b-mac-ft</independentVar>
                      <tableData>
                          0.0000	1.2030
                          0.1000	1.1270
                          0.1500	1.0900
                          0.2000	1.0730
                          0.3000	1.0460
                          0.4000	1.0550
                          0.5000	1.0190
                          0.6000	1.0130
                          0.7000	1.0080
                          0.8000	1.0060
                          0.9000	1.0030
                          1.0000	1.0020
                          1.1000	1.0000
                      </tableData>
                  </table>
            </product>
        </function>


            <function name="aero/coefficient/CD0">
                <description>Drag_at_zero_lift</description>
                <product>
			<value>1.0</value>
                      <table>
                          <independentVar>aero/alpha-rad</independentVar>
                          <tableData>
                             -1.4000	1.5000
                             -0.2600	0.0320
                              0.0000	0.0190
                              0.2600	0.0320
                              1.4000	1.5000
                          </tableData>
                      </table>
                </product>
            </function>

            <function name="aero/coefficient/CDi">
                <description>Induced_drag</description>
                <product>
                    <property>aero/cl-squared</property>
                    <value>0.125</value>
                </product>
            </function>

            <function name="aero/coefficient/CDmach">
                <description>Drag_due_to_mach</description>
                <product>
                  <value>1.0</value>
                      <table>
                          <independentVar>velocities/mach</independentVar>
			  <tableData>
				  <!--transcribed from F-5E case study, page 32>
				  and page 40 -->
				  0.0000	0.0000
				  0.4000	0.0000
				  0.6000	0.0005
				  0.7000	0.0010
				  0.8000	0.0005
				  0.9000	0.0000
				  0.9500	0.0030
				  1.0000	0.0150
				  1.1000	0.0200
				  1.1500	0.0220
				  1.2000	0.0230
				  1.3000	0.0250
				  1.4000	0.0260
				  1.5000	0.0270
				  1.6000	0.0280
				  1.7000	0.0270
				  1.8000	0.0260
                          </tableData>
                      </table>
                </product>
            </function>

            <function name="aero/coefficient/CDflap">
                <description>Drag_due_to_flaps</description>
                <product>
                       <table>
                          <independentVar>fcs/flap-pos-norm</independentVar>
                          <tableData>
                              0.0	0.00
                              0.5	0.016
                              1.0	0.05
                          </tableData>
                      </table>
                 </product>
            </function>

            <function name="aero/coefficient/CDgear">
                <description>Drag_due_to_gear</description>
                <product>
                    <property>gear/gear-pos-norm</property>
                    <value>0.028</value>
                </product>
            </function>

            <function name="aero/coefficient/CDsb">
                <description>Drag_due_to_speedbrakes</description>
                <product>
                    <property>fcs/speedbrake-pos-norm</property>
                    <value>0.05</value>
                </product>
            </function>

            <function name="aero/coefficient/CDbeta">
                <description>Drag_due_to_sideslip</description>
                      <table>
                          <independentVar>aero/beta-rad</independentVar>
                          <tableData>
                             -1.4000	1.2300
                             -0.2600	0.0500
                              0.0000	0.0000
                              0.2600	0.0500
                              1.4000	1.2300
                          </tableData>
                      </table>
                  </function>

            <function name="aero/coefficient/CDde">
                <description>Drag_due_to_Elevator_Deflection</description>
                <product>
                    <abs><property>fcs/elevator-pos-norm</property></abs>
                    <value>0.034</value>
                </product>
            </function>

    <function name="aero/coefficient/CDbc">
       <description>Drag_coefficient_due_to_braking_chute</description>
         <product>
           <property>systems/chute/unfurl-norm</property>
           <value>2</value>
         </product>
    </function>

<axis name="DRAG">

    <function name="aero/force/drag">
      <description>Drag_force</description>
      <product>
          <sum>
            <property>aero/coefficient/CD0</property>
            <property>aero/coefficient/CDi</property>
            <property>aero/coefficient/CDflap</property>
            <property>aero/coefficient/CDgear</property>
            <property>aero/coefficient/CDsb</property>
            <property>aero/coefficient/CDbeta</property>
            <property>aero/coefficient/CDde</property>
            <property>aero/coefficient/CDbc</property>
          </sum>
          <property>aero/qbar-area</property>
      </product>
    </function>

  </axis>

        <axis name="SIDE">
            <function name="aero/coefficient/CYb">
                <description>Side_force_due_to_beta</description>
                <product>
                    <property>aero/qbar-psf</property>
                    <property>metrics/Sw-sqft</property>
                    <property>aero/beta-rad</property>
                    <value>-1.0000</value>
                </product>
            </function>
        </axis>

        <axis name="LIFT">
            <function name="aero/coefficient/CLalpha">
                <description>Lift_due_to_alpha</description>
                <product>
                    <property>aero/qbar-psf</property>
                    <property>metrics/Sw-sqft</property>
                    <property>aero/function/kCLge</property>
                      <table>
                          <independentVar lookup="row">aero/alpha-rad</independentVar>
                          <independentVar lookup="column">fcs/flap-pos-norm</independentVar>
                          <tableData>
                                        0       0.5      1
                             -0.25     -0.736  -0.50    -0.10
                              0.00	0.000   0.17     0.24
                              0.25	0.736   1.10     1.30
                              0.35	0.100   0.65     0.55
                              0.60	0.174   0.20     0.20
                              1.40      0       0        0
                          </tableData>
                      </table>
                </product>
            </function>
            <function name="aero/coefficient/CLde">
                <description>Lift_due_to_Elevator_Deflection</description>
                <product>
                    <property>aero/qbar-psf</property>
                    <property>metrics/Sw-sqft</property>
                    <property>fcs/elevator-pos-norm</property>
                    <value>0.1</value>
                </product>
            </function>
            <function name="aero/coefficient/buffet">
                <description>Buffet at high alpha</description>
                <product>
                   <property>aero/alpha_buffet/sine_wave</property>
                   <property>aero/alpha_buffet/strength</property>
                </product>
            </function>
        </axis>

        <axis name="ROLL">
            <function name="aero/coefficient/Clb">
                <description>Roll_moment_due_to_beta</description>
                <product>
                    <property>aero/qbar-psf</property>
                    <property>metrics/Sw-sqft</property>
                    <property>metrics/bw-ft</property>
                    <property>aero/beta-rad</property>
                      <table>
                          <independentVar>aero/alpha-rad</independentVar>
                          <tableData>
                              0.0000	-0.0500
                              0.5200	-0.1200
                          </tableData>
                      </table>
                </product>
            </function>
            <function name="aero/coefficient/Clp">
                <description>Roll_moment_due_to_roll_rate</description>
                <product>
                    <property>aero/qbar-psf</property>
                    <property>metrics/Sw-sqft</property>
                    <property>metrics/bw-ft</property>
                    <property>aero/bi2vel</property>
                    <property>velocities/p-aero-rad_sec</property>
                    <value>-0.4000</value>
                </product>
            </function>
            <function name="aero/coefficient/Clr">
                <description>Roll_moment_due_to_yaw_rate</description>
                <product>
                    <property>aero/qbar-psf</property>
                    <property>metrics/Sw-sqft</property>
                    <property>metrics/bw-ft</property>
                    <property>aero/bi2vel</property>
                    <property>velocities/r-aero-rad_sec</property>
                    <value>0.1200</value>
                </product>
            </function>
            <function name="aero/coefficient/CldaL">
                <description>Roll_moment_due_to_left_aileron</description>
                <product>
                    <property>aero/qbar-psf</property>
                    <property>metrics/Sw-sqft</property>
                    <property>metrics/bw-ft</property>
                    <property>fcs/left-aileron-pos-norm</property>
                    <value>0.0193</value>
                </product>
            </function>
            <function name="aero/coefficient/CldaR">
                <description>Roll_moment_due_to_right_aileron</description>
                <product>
                    <property>aero/qbar-psf</property>
                    <property>metrics/Sw-sqft</property>
                    <property>metrics/bw-ft</property>
                    <property>fcs/right-aileron-pos-norm</property>
                    <value>0.0193</value>
                </product>
            </function>
            <function name="aero/coefficient/Cldr">
                <description>Roll_moment_due_to_rudder</description>
                <product>
                    <property>aero/qbar-psf</property>
                    <property>metrics/Sw-sqft</property>
                    <property>metrics/bw-ft</property>
                    <property>fcs/rudder-pos-norm</property>
                    <value>0.0021</value>
                </product>
            </function>
        </axis>

        <axis name="PITCH">
            <function name="aero/coefficient/Cmalpha">
                <description>Pitch_moment_due_to_alpha</description>
                <product>
                    <property>aero/qbar-psf</property>
                    <property>metrics/Sw-sqft</property>
                    <property>metrics/cbarw-ft</property>
                    <property>aero/alpha-rad</property>
                    <value>-0.3000</value>
                </product>
            </function>
            <function name="aero/coefficient/Cmde">
                <description>Pitch_moment_due_to_elevator</description>
                <product>
                    <property>aero/qbar-psf</property>
                    <property>metrics/Sw-sqft</property>
                    <property>metrics/cbarw-ft</property>
                    <property>fcs/elevator-pos-norm</property>
                    <value>-0.16</value>
                </product>
            </function>
            <function name="aero/coefficient/Cmq">
                <description>Pitch_moment_due_to_pitch_rate</description>
                <product>
                    <property>aero/qbar-psf</property>
                    <property>metrics/Sw-sqft</property>
                    <property>metrics/cbarw-ft</property>
                    <property>aero/ci2vel</property>
                    <property>velocities/q-aero-rad_sec</property>
                    <value>-18.0000</value>
                </product>
            </function>
            <function name="aero/coefficient/Cmadot">
                <description>Pitch_moment_due_to_alpha_rate</description>
                <product>
                    <property>aero/qbar-psf</property>
                    <property>metrics/Sw-sqft</property>
                    <property>metrics/cbarw-ft</property>
                    <property>aero/ci2vel</property>
                    <property>aero/alphadot-rad_sec</property>
                    <value>-9.0000</value>
                </product>
            </function>
            <function name="aero/coefficient/Cmflaps">
                <description>Pitch_moment_due_to_flaps</description>
                <product>
                    <property>aero/qbar-psf</property>
                    <property>metrics/Sw-sqft</property>
                    <property>metrics/cbarw-ft</property>
                    <property>fcs/flap-pos-deg</property>
                    <value>-0.0025</value>
                </product>
            </function>
        </axis>

        <axis name="YAW">
            <function name="aero/coefficient/Cnb">
                <description>Yaw_moment_due_to_beta</description>
                <product>
                    <property>aero/qbar-psf</property>
                    <property>metrics/Sw-sqft</property>
                    <property>metrics/bw-ft</property>
                    <property>aero/beta-rad</property>
                    <value>0.120</value>
                </product>
            </function>
            <function name="aero/coefficient/Cnr">
                <description>Yaw_moment_due_to_yaw_rate</description>
                <product>
                    <property>aero/qbar-psf</property>
                    <property>metrics/Sw-sqft</property>
                    <property>metrics/bw-ft</property>
                    <property>aero/bi2vel</property>
                    <property>velocities/r-aero-rad_sec</property>
                    <value>-0.2</value>
                </product>
            </function>
            <function name="aero/coefficient/Cndr">
                <description>Yaw_moment_due_to_rudder</description>
                <product>
                    <property>aero/qbar-psf</property>
                    <property>metrics/Sw-sqft</property>
                    <property>metrics/bw-ft</property>
                    <property>fcs/rudder-pos-norm</property>
                    <value>-0.007</value>
                </product>
            </function>
        </axis>
    </aerodynamics>

 <external_reactions>

  <force name="hook" frame="BODY">
   <location unit="IN">
     <x>  414.0 </x>
     <y>    0.0 </y>
     <z>  -15.0 </z>
   </location>
   <direction>
     <x>  -0.9995 </x>
     <y>   0.0    </y>
     <z>   0.01   </z>
   </direction>
  </force>

 </external_reactions>

<!--
    <output name="F-5E_datalog.csv" rate="20" type="CSV">
        <property> aero/qbar-psf </property>
        <property> attitude/phi-rad </property>
        <property> position/h-sl-ft </property>
        <property> velocities/vc-kts </property>
        <property> fcs/throttle-cmd-norm </property>
        <property> fcs/elevator-pos-norm </property>
        <rates> ON </rates>
        <velocities> ON </velocities>
        <forces> ON </forces>
        <moments> ON </moments>
        <position> ON </position>
        <propulsion> ON </propulsion>
        <aerosurfaces> OFF </aerosurfaces>
        <fcs> OFF </fcs>
        <ground_reactions> ON </ground_reactions>
    </output>
-->

</fdm_config>
